50! = 3.04141e64
1.2*sqrt(2)*1/2 = 0.848528
1/0.849/sqrt(2) = 0.83287
[2/3; 2/3] + [-0.1; 1] - 0.75*[2/3; 2/3] = [0.0666667; 1.16667]
norm([0.267; -0.833]) = 0.874745
norm([2/3; 2/3]) = 0.942809
J(u, u_1, λ) := 1/2*(1 - u_1/u)^2 + λ*u_1^2
DJ := argmin(□)  # error: Отсутствует элемент или выражение.
u := 0.5
λ := 0.6
u_1 := u
u_2 := 1
UV(v_1, v_2) := [u_1*v_1, u_1*v_2; v_1, v_2]
J(v_1, v_2) := 1/2*(1 - u_1*v_2)^2 + λ*(u_1^2 + v_1^2)
d/dv_1(J(v_1, v_2)) == 0 → 1.2*v_1 == 0
v_1 := 0
d/dv_2(J(v_1, v_2)) == 0 → 0.25*v_2 - 0.5 == 0
v_2 := 2
clear(u_1, u_2, u)
UV(u_1, u_2) := [u_1*v_1, u_1*v_2; u_2*v_1, u_2*v_2] → [0, 2*u_1; 0, 2*u_2]
J(u_1, u_2) := 1/2*(1 - u_1*v_2)^2 + λ*(u_1^2 + v_1^2)
d/du_1(J(u_1, u_2)) == 0 → 4*u_1 + 1.2*u_1 - 2 == 0
u_1 := 2/5.2 = 0.384615
d/du_2(J(u_1, u_2)) == 0 → 1
u_2 := 0
clear(v_1, v_2, u)
J(v_1, v_2) := 1/2*(1 - u_1*v_2)^2 + λ*(u_1^2 + v_1^2)
d/dv_1(J(v_1, v_2)) == 0 → 1.2*v_1 == 0
v_1 := 0
d/dv_2(J(v_1, v_2)) == 0 → 0.147928994083*v_2 - 0.384615384615 == 0
v_2 := 0.384615384615/0.147928994083 = 2.6
clear(v_1, v_2, u_1, u_2)
u := 1.5
λ := 0.6
u_1 := u
u_2 := 1
UV(v_1, v_2) := [u_1*v_1, u_1*v_2; v_1, v_2]
J(v_1, v_2) := 1/2*(1 - u_1*v_2)^2 + λ*(u_1^2 + v_1^2)
d/dv_1(J(v_1, v_2)) == 0 → 1.2*v_1 == 0
v_1 := 0
d/dv_2(J(v_1, v_2)) == 0 → 2.25*v_2 - 1.5 == 0
v_2 := 1.5/2.25 = 0.666667
clear(u_1, u_2, u)
UV(u_1, u_2) := [u_1*v_1, u_1*v_2; u_2*v_1, u_2*v_2] → [0, 0.666666666667*u_1; 0, 0.666666666667*u_2]
J(u_1, u_2) := 1/2*(1 - u_1*v_2)^2 + λ*(u_1^2 + v_1^2)
d/du_1(J(u_1, u_2)) == 0 → 1.64444444444*u_1 - 0.666666666667 == 0
u_1 := 0.666666666667/1.64444444444 = 0.405405
d/du_2(J(u_1, u_2)) == 0 → 1
u_2 := 0
clear(v_1, v_2, u)
J(v_1, v_2) := 1/2*(1 - u_1*v_2)^2 + λ*(u_1^2 + v_1^2)
d/dv_1(J(v_1, v_2)) == 0 → 1.2*v_1 == 0
v_1 := 0
d/dv_2(J(v_1, v_2)) == 0 → 0.164353542732*v_2 - 0.405405405405 == 0
v_2 := 0.405405405405/0.164353542732 = 2.46667
clear(v_1, v_2, u_1, u_2)
u := 1.5
λ := 1.6
u_1 := u
u_2 := 1
UV(v_1, v_2) := [u_1*v_1, u_1*v_2; v_1, v_2]
J(v_1, v_2) := 1/2*(1 - u_1*v_2)^2 + λ*(u_1^2 + v_1^2)
d/dv_1(J(v_1, v_2)) == 0 → 3.2*v_1 == 0
v_1 := 0
d/dv_2(J(v_1, v_2)) == 0 → 2.25*v_2 - 1.5 == 0
v_2 := 1.5/2.25 = 0.666667
clear(u_1, u_2, u)
UV(u_1, u_2) := [u_1*v_1, u_1*v_2; u_2*v_1, u_2*v_2] → [0, 0.666666666667*u_1; 0, 0.666666666667*u_2]
J(u_1, u_2) := 1/2*(1 - u_1*v_2)^2 + λ*(u_1^2 + v_1^2)
d/du_1(J(u_1, u_2)) == 0 → 3.64444444444*u_1 - 0.666666666667 == 0
u_1 := 0.666666666667/3.64444444444 = 0.182927
d/du_2(J(u_1, u_2)) → 0
u_2 := 1
clear(v_1, v_2, u)
J(v_1, v_2) := 1/2*(1 - u_1*v_2)^2 + λ*(u_1^2 + v_1^2)
d/dv_1(J(v_1, v_2)) == 0 → 3.2*v_1 == 0
v_1 := 0
d/dv_2(J(v_1, v_2)) == 0 → 0.0334622248662*v_2 - 0.182926829268 == 0
v_2 := 0.182926829268/0.0334622248662 = 5.46667
clear(u_1, u_2, u)
UV(u_1, u_2) := [u_1*v_1, u_1*v_2; u_2*v_1, u_2*v_2] → [0, 5.46666666667*u_1; 0, 5.46666666667*u_2]
J(u_1, u_2) := 1/2*(1 - u_1*v_2)^2 + λ*(u_1^2 + v_1^2)
d/du_1(J(u_1, u_2)) == 0 → 33.0844444444*u_1 - 5.46666666667 == 0
u_1 := 5.46666666667/33.0844444444 = 0.165234
d/du_2(J(u_1, u_2)) → 0
u_2 := 1
clear(v_1, v_2, u)
J(v_1, v_2) := 1/2*(1 - u_1*v_2)^2 + λ*(u_1^2 + v_1^2)
d/dv_1(J(v_1, v_2)) == 0 → 3.2*v_1 == 0
v_1 := 0
d/dv_2(J(v_1, v_2)) == 0 → 0.0273021905853*v_2 - 0.165233745298 == 0
v_2 := 0.165233745298/0.0273021905853 = 6.05203
